<Lems>

    <Target component="sim_c302_A_Pharyngeal" />

    <!-- Include core NeuroML2 ComponentType definitions -->

    <Include file="Cells.xml" />
    <Include file="Networks.xml" />
    <Include file="Simulation.xml" />

    <Include file="c302_A_Pharyngeal.nml" />

    <!-- End of NeuroML2 content -->

    <Simulation id="sim_c302_A_Pharyngeal" length="500ms" step="0.025ms" target="c302_A_Pharyngeal">

        <Display id="d0" title="c302_A_Pharyngeal: Membrane potential of a number of cells" timeScale="1ms" xmin="-50.0" xmax="550.0" ymin="-72" ymax="-48">

            <Line id="I1L" quantity="I1L/0/generic_iaf_cell/v" scale="1mV" color="#bd7aca" timeScale="1ms" />
            <Line id="I1R" quantity="I1R/0/generic_iaf_cell/v" scale="1mV" color="#0086a7" timeScale="1ms" />
            <Line id="I2L" quantity="I2L/0/generic_iaf_cell/v" scale="1mV" color="#f0ce88" timeScale="1ms" />
            <Line id="I2R" quantity="I2R/0/generic_iaf_cell/v" scale="1mV" color="#ec11fe" timeScale="1ms" />
            <Line id="I3" quantity="I3/0/generic_iaf_cell/v" scale="1mV" color="#795ad3" timeScale="1ms" />
            <Line id="I4" quantity="I4/0/generic_iaf_cell/v" scale="1mV" color="#b1b2e3" timeScale="1ms" />
            <Line id="I5" quantity="I5/0/generic_iaf_cell/v" scale="1mV" color="#9a1159" timeScale="1ms" />
            <Line id="I6" quantity="I6/0/generic_iaf_cell/v" scale="1mV" color="#433b55" timeScale="1ms" />
            <Line id="M1" quantity="M1/0/generic_iaf_cell/v" scale="1mV" color="#faf5c1" timeScale="1ms" />
            <Line id="M2L" quantity="M2L/0/generic_iaf_cell/v" scale="1mV" color="#5b0058" timeScale="1ms" />
            <Line id="M2R" quantity="M2R/0/generic_iaf_cell/v" scale="1mV" color="#ebae00" timeScale="1ms" />
            <Line id="M3L" quantity="M3L/0/generic_iaf_cell/v" scale="1mV" color="#190025" timeScale="1ms" />
            <Line id="M3R" quantity="M3R/0/generic_iaf_cell/v" scale="1mV" color="#9d3736" timeScale="1ms" />
            <Line id="M4" quantity="M4/0/generic_iaf_cell/v" scale="1mV" color="#22a200" timeScale="1ms" />
            <Line id="M5" quantity="M5/0/generic_iaf_cell/v" scale="1mV" color="#b3ae27" timeScale="1ms" />
            <Line id="MCL" quantity="MCL/0/generic_iaf_cell/v" scale="1mV" color="#7bf94d" timeScale="1ms" />
            <Line id="MCR" quantity="MCR/0/generic_iaf_cell/v" scale="1mV" color="#b93900" timeScale="1ms" />
            <Line id="MI" quantity="MI/0/generic_iaf_cell/v" scale="1mV" color="#f9f5e1" timeScale="1ms" />
            <Line id="NSML" quantity="NSML/0/generic_iaf_cell/v" scale="1mV" color="#f8194d" timeScale="1ms" />
            <Line id="NSMR" quantity="NSMR/0/generic_iaf_cell/v" scale="1mV" color="#8aea1e" timeScale="1ms" />

        </Display>

        <OutputFile id="of0" fileName="c302_A_Pharyngeal.dat">
            <OutputColumn id="I1L_v" quantity="I1L/0/generic_iaf_cell/v"/>
            <OutputColumn id="I1R_v" quantity="I1R/0/generic_iaf_cell/v"/>
            <OutputColumn id="I2L_v" quantity="I2L/0/generic_iaf_cell/v"/>
            <OutputColumn id="I2R_v" quantity="I2R/0/generic_iaf_cell/v"/>
            <OutputColumn id="I3_v" quantity="I3/0/generic_iaf_cell/v"/>
            <OutputColumn id="I4_v" quantity="I4/0/generic_iaf_cell/v"/>
            <OutputColumn id="I5_v" quantity="I5/0/generic_iaf_cell/v"/>
            <OutputColumn id="I6_v" quantity="I6/0/generic_iaf_cell/v"/>
            <OutputColumn id="M1_v" quantity="M1/0/generic_iaf_cell/v"/>
            <OutputColumn id="M2L_v" quantity="M2L/0/generic_iaf_cell/v"/>
            <OutputColumn id="M2R_v" quantity="M2R/0/generic_iaf_cell/v"/>
            <OutputColumn id="M3L_v" quantity="M3L/0/generic_iaf_cell/v"/>
            <OutputColumn id="M3R_v" quantity="M3R/0/generic_iaf_cell/v"/>
            <OutputColumn id="M4_v" quantity="M4/0/generic_iaf_cell/v"/>
            <OutputColumn id="M5_v" quantity="M5/0/generic_iaf_cell/v"/>
            <OutputColumn id="MCL_v" quantity="MCL/0/generic_iaf_cell/v"/>
            <OutputColumn id="MCR_v" quantity="MCR/0/generic_iaf_cell/v"/>
            <OutputColumn id="MI_v" quantity="MI/0/generic_iaf_cell/v"/>
            <OutputColumn id="NSML_v" quantity="NSML/0/generic_iaf_cell/v"/>
            <OutputColumn id="NSMR_v" quantity="NSMR/0/generic_iaf_cell/v"/>
        </OutputFile>

    </Simulation>

</Lems>
