<Lems>

    <!--

Parameters and setting used to generate this network:

    Cells:                         ['ADAL', 'AIBL', 'RIVR', 'RMEV']
    Cell stimulated:               ['ADAL', 'RIVR']
    Connection numbers overridden: None
    Connection numbers scaled:     None

    Known BioParameters:
        BioParameter: iaf_leak_reversal = -70mV (SRC: BlindGuess, certainty 0.1)
        BioParameter: iaf_reset = -70mV (SRC: BlindGuess, certainty 0.1)
        BioParameter: iaf_thresh = -50mV (SRC: BlindGuess, certainty 0.1)
        BioParameter: iaf_C = 0.2nF (SRC: BlindGuess, certainty 0.1)
        BioParameter: iaf_conductance = 0.01uS (SRC: BlindGuess, certainty 0.1)
        BioParameter: chem_exc_syn_gbase = 0.2nS (SRC: BlindGuess, certainty 0.1)
        BioParameter: chem_exc_syn_erev = 0mV (SRC: BlindGuess, certainty 0.1)
        BioParameter: chem_exc_syn_rise = 3ms (SRC: BlindGuess, certainty 0.1)
        BioParameter: chem_exc_syn_decay = 10ms (SRC: BlindGuess, certainty 0.1)
        BioParameter: chem_inh_syn_gbase = 0.2nS (SRC: BlindGuess, certainty 0.1)
        BioParameter: chem_inh_syn_erev = -80mV (SRC: BlindGuess, certainty 0.1)
        BioParameter: chem_inh_syn_rise = 3ms (SRC: BlindGuess, certainty 0.1)
        BioParameter: chem_inh_syn_decay = 10ms (SRC: BlindGuess, certainty 0.1)
        BioParameter: elec_syn_gbase = 0.2nS (SRC: BlindGuess, certainty 0.1)
        BioParameter: elec_syn_erev = 0mV (SRC: BlindGuess, certainty 0.1)
        BioParameter: elec_syn_rise = 3ms (SRC: BlindGuess, certainty 0.1)
        BioParameter: elec_syn_decay = 10ms (SRC: BlindGuess, certainty 0.1)
        BioParameter: unphysiological_offset_current = 0.21nA (SRC: KnownError, certainty 0)
        BioParameter: unphysiological_offset_current_dur = 200ms (SRC: KnownError, certainty 0)

    -->

    <Target component="sim_c302_A_Syns" />

    <!-- Include core NeuroML2 ComponentType definitions -->

    <Include file="Cells.xml" />
    <Include file="Networks.xml" />
    <Include file="Simulation.xml" />

    <Include file="c302_A_Syns.nml" />

    <!-- End of NeuroML2 content -->

    <Simulation id="sim_c302_A_Syns" length="500ms" step="0.1ms" target="c302_A_Syns">

        <Display id="d0" title="c302_A_Syns: Membrane potential of a number of cells" timeScale="1ms" xmin="-50.0" xmax="550.0" ymin="-72" ymax="-48">

            <Line id="ADAL" quantity="ADAL/0/generic_iaf_cell/v" scale="1mV" color="#95c793" timeScale="1ms" />
            <Line id="AIBL" quantity="AIBL/0/generic_iaf_cell/v" scale="1mV" color="#add5cf" timeScale="1ms" />
            <Line id="RIVR" quantity="RIVR/0/generic_iaf_cell/v" scale="1mV" color="#2122e6" timeScale="1ms" />
            <Line id="RMEV" quantity="RMEV/0/generic_iaf_cell/v" scale="1mV" color="#948a29" timeScale="1ms" />

        </Display>

        <OutputFile id="of0" fileName="c302_A_Syns.dat">
            <OutputColumn id="ADAL_v" quantity="ADAL/0/generic_iaf_cell/v"/>
            <OutputColumn id="AIBL_v" quantity="AIBL/0/generic_iaf_cell/v"/>
            <OutputColumn id="RIVR_v" quantity="RIVR/0/generic_iaf_cell/v"/>
            <OutputColumn id="RMEV_v" quantity="RMEV/0/generic_iaf_cell/v"/>
        </OutputFile>

    </Simulation>

</Lems>
