<neuroml xmlns="http://www.neuroml.org/schema/neuroml2"  xmlns:xs="http://www.w3.org/2001/XMLSchema" xmlns:xsi="http://www.w3.org/2001/XMLSchema-instance" xsi:schemaLocation="http://www.neuroml.org/schema/neuroml2 https://raw.github.com/NeuroML/NeuroML2/development/Schemas/NeuroML2/NeuroML_v2beta4.xsd" id="c302_C1_Syns">
    <notes>

Parameters and setting used to generate this network:

    Cells:                         ['URYDL', 'SMDDR', 'VD12', 'VB11', 'AIZL', 'ASHL']
    Cell stimulated:               ['URYDL', 'VD12', 'AIZL']
    Connection numbers overridden: None
    Connection numbers scaled:     None
    Include muscles:               False

    Known BioParameters:
        BioParameter: iaf_leak_reversal = -70mV (SRC: BlindGuess, certainty 0.1)
        BioParameter: iaf_reset = -70mV (SRC: BlindGuess, certainty 0.1)
        BioParameter: iaf_thresh = -50mV (SRC: BlindGuess, certainty 0.1)
        BioParameter: iaf_C = 3pF (SRC: BlindGuess, certainty 0.1)
        BioParameter: iaf_conductance = 0.1nS (SRC: BlindGuess, certainty 0.1)
        BioParameter: muscle_iaf_leak_reversal = -50mV (SRC: BlindGuess, certainty 0.1)
        BioParameter: muscle_iaf_reset = -50mV (SRC: BlindGuess, certainty 0.1)
        BioParameter: muscle_iaf_thresh = -30mV (SRC: BlindGuess, certainty 0.1)
        BioParameter: muscle_iaf_C = 3pF (SRC: BlindGuess, certainty 0.1)
        BioParameter: muscle_iaf_conductance = 0.1nS (SRC: BlindGuess, certainty 0.1)
        BioParameter: neuron_iaf_leak_reversal = -50mV (SRC: BlindGuess, certainty 0.1)
        BioParameter: neuron_iaf_reset = -50mV (SRC: BlindGuess, certainty 0.1)
        BioParameter: neuron_iaf_thresh = -30mV (SRC: BlindGuess, certainty 0.1)
        BioParameter: neuron_iaf_C = 3pF (SRC: BlindGuess, certainty 0.1)
        BioParameter: neuron_iaf_conductance = 0.1nS (SRC: BlindGuess, certainty 0.1)
        BioParameter: chem_exc_syn_gbase = .1 nS (SRC: BlindGuess, certainty 0.1)
        BioParameter: chem_exc_syn_erev = 0 mV (SRC: BlindGuess, certainty 0.1)
        BioParameter: chem_exc_syn_rise = 1 ms (SRC: Bli ndGuess, certainty 0.1)
        BioParameter: chem_exc_syn_decay = 5 ms (SRC: BlindGuess, certainty 0.1)
        BioParameter: chem_inh_syn_gbase = .1 nS (SRC: BlindGuess, certainty 0.1)
        BioParameter: chem_inh_syn_erev = -60 mV (SRC: BlindGuess, certainty 0.1)
        BioParameter: chem_inh_syn_rise = 2 ms (SRC: BlindGuess, certainty 0.1)
        BioParameter: chem_inh_syn_decay = 40 ms (SRC: BlindGuess, certainty 0.1)
        BioParameter: elec_syn_gbase = 0.00052 nS (SRC: BlindGuess, certainty 0.1)
        BioParameter: elec_syn_erev = 0mV (SRC: BlindGuess, certainty 0.1)
        BioParameter: elec_syn_rise = 3ms (SRC: BlindGuess, certainty 0.1)
        BioParameter: elec_syn_decay = 10ms (SRC: BlindGuess, certainty 0.1)
        BioParameter: unphysiological_offset_current = 5.135697186048022 pA (SRC: KnownError, certainty 0)
        BioParameter: unphysiological_offset_current_del = 0 ms (SRC: KnownError, certainty 0)
        BioParameter: unphysiological_offset_current_dur = 2000 ms (SRC: KnownError, certainty 0)
        BioParameter: inh_syn_erev = -70 mV (SRC: BlindGuess, certainty 0.1)
        BioParameter: muscle_iaf_tau1 = 50ms (SRC: BlindGuess, certainty 0.1)
        BioParameter: neuron_iaf_tau1 = 50ms (SRC: BlindGuess, certainty 0.1)
        BioParameter: cell_diameter = 5 (SRC: BlindGuess, certainty 0.1)
        BioParameter: initial_memb_pot = -45 mV (SRC: BlindGuess, certainty 0.1)
        BioParameter: specific_capacitance = 1 uF_per_cm2 (SRC: BlindGuess, certainty 0.1)
        BioParameter: muscle_spike_thresh = -20 mV (SRC: BlindGuess, certainty 0.1)
        BioParameter: neuron_spike_thresh = -20 mV (SRC: BlindGuess, certainty 0.1)
        BioParameter: muscle_leak_cond_density = 0.005 mS_per_cm2 (SRC: BlindGuess, certainty 0.1)
        BioParameter: neuron_leak_cond_density = 0.005 mS_per_cm2 (SRC: BlindGuess, certainty 0.1)
        BioParameter: leak_erev = -50 mV (SRC: BlindGuess, certainty 0.1)
        BioParameter: muscle_k_slow_cond_density = 0.1408257307011203 mS_per_cm2 (SRC: BlindGuess, certainty 0.1)
        BioParameter: neuron_k_slow_cond_density = 1.8333751019872582 mS_per_cm2 (SRC: BlindGuess, certainty 0.1)
        BioParameter: k_slow_erev = -60 mV (SRC: BlindGuess, certainty 0.1)
        BioParameter: muscle_k_fast_cond_density = 0.005 mS_per_cm2 (SRC: BlindGuess, certainty 0.1)
        BioParameter: neuron_k_fast_cond_density = 0.0711643917483308 mS_per_cm2 (SRC: BlindGuess, certainty 0.1)
        BioParameter: k_fast_erev = -60 mV (SRC: BlindGuess, certainty 0.1)
        BioParameter: muscle_ca_boyle_cond_density = 1.7139140434941569 mS_per_cm2 (SRC: BlindGuess, certainty 0.1)
        BioParameter: neuron_ca_boyle_cond_density = 1.6862775772264702 mS_per_cm2 (SRC: BlindGuess, certainty 0.1)
        BioParameter: ca_boyle_erev = 40 mV (SRC: BlindGuess, certainty 0.1)
        BioParameter: ca_conc_decay_time = 13.811870945509265 ms (SRC: BlindGuess, certainty 0.1)
        BioParameter: ca_conc_rho = 0.000238919 mol_per_m_per_A_per_s (SRC: BlindGuess, certainty 0.1)
        BioParameter: exc_syn_conductance = 0.09 nS (SRC: BlindGuess, certainty 0.1)
        BioParameter: exc_syn_delta = 5 mV (SRC: BlindGuess, certainty 0.1)
        BioParameter: exc_syn_vth = 0 mV (SRC: BlindGuess, certainty 0.1)
        BioParameter: exc_syn_erev = 0 mV (SRC: BlindGuess, certainty 0.1)
        BioParameter: exc_syn_k = 0.025per_ms (SRC: BlindGuess, certainty 0.1)
        BioParameter: inh_syn_conductance = 0.09 nS (SRC: BlindGuess, certainty 0.1)
        BioParameter: inh_syn_delta = 5 mV (SRC: BlindGuess, certainty 0.1)
        BioParameter: inh_syn_vth = 0 mV (SRC: BlindGuess, certainty 0.1)
        BioParameter: inh_syn_k = 0.025per_ms (SRC: BlindGuess, certainty 0.1)

</notes>
    <include href="cell_C.xml"></include>
    <fixedFactorConcentrationModel id="CaPool" ion="ca" restingConc="0 mM" decayConstant="13.811870945509265 ms" rho="0.000238919 mol_per_m_per_A_per_s"/>
    <gapJunction id="elec_syn_1conns" conductance="0.00052nS"/>
    <silentSynapse id="silent"/>
    <gradedSynapse id="inh_syn_1conns" conductance="0.09nS" delta="5 mV" Vth="0 mV" k="0.025per_ms" erev="-70 mV"/>
    <gradedSynapse id="exc_syn_1conns" conductance="0.09nS" delta="5 mV" Vth="0 mV" k="0.025per_ms" erev="0 mV"/>
    <cell id="GenericMuscleCell">
        <morphology id="morphology_GenericMuscleCell">
            <segment id="0" name="soma">
                <proximal x="0.000000e+00" y="0.000000e+00" z="0.000000e+00" diameter="5.000000e+00"/>
                <distal x="0.000000e+00" y="0.000000e+00" z="0.000000e+00" diameter="5.000000e+00"/>
            </segment>
        </morphology>
        <biophysicalProperties id="biophys_GenericMuscleCell">
            <membraneProperties>
                <channelDensity id="Leak_all" ionChannel="Leak" condDensity="0.005 mS_per_cm2" erev="-50 mV" ion="non_specific"/>
                <channelDensity id="k_slow_all" ionChannel="k_slow" condDensity="0.1408257307011203 mS_per_cm2" erev="-60 mV" ion="k"/>
                <channelDensity id="k_fast_all" ionChannel="k_fast" condDensity="0.005 mS_per_cm2" erev="-60 mV" ion="k"/>
                <channelDensity id="ca_boyle_all" ionChannel="ca_boyle" condDensity="1.7139140434941569 mS_per_cm2" erev="40 mV" ion="ca"/>
                <spikeThresh value="-20 mV"/>
                <specificCapacitance value="1 uF_per_cm2"/>
                <initMembPotential value="-45 mV"/>
            </membraneProperties>
            <intracellularProperties>
                <species id="ca" concentrationModel="CaPool" ion="ca" initialConcentration="0 mM" initialExtConcentration="2E-6 mol_per_cm3"/>
                <resistivity value="0.1 kohm_cm"/>
            </intracellularProperties>
        </biophysicalProperties>
    </cell>
    <cell id="GenericNeuronCell">
        <morphology id="morphology_GenericNeuronCell">
            <segment id="0" name="soma">
                <proximal x="0.000000e+00" y="0.000000e+00" z="0.000000e+00" diameter="5.000000e+00"/>
                <distal x="0.000000e+00" y="0.000000e+00" z="0.000000e+00" diameter="5.000000e+00"/>
            </segment>
        </morphology>
        <biophysicalProperties id="biophys_GenericNeuronCell">
            <membraneProperties>
                <channelDensity id="Leak_all" ionChannel="Leak" condDensity="0.005 mS_per_cm2" erev="-50 mV" ion="non_specific"/>
                <channelDensity id="k_slow_all" ionChannel="k_slow" condDensity="1.8333751019872582 mS_per_cm2" erev="-60 mV" ion="k"/>
                <channelDensity id="k_fast_all" ionChannel="k_fast" condDensity="0.0711643917483308 mS_per_cm2" erev="-60 mV" ion="k"/>
                <channelDensity id="ca_boyle_all" ionChannel="ca_boyle" condDensity="1.6862775772264702 mS_per_cm2" erev="40 mV" ion="ca"/>
                <spikeThresh value="-20 mV"/>
                <specificCapacitance value="1 uF_per_cm2"/>
                <initMembPotential value="-45 mV"/>
            </membraneProperties>
            <intracellularProperties>
                <species id="ca" concentrationModel="CaPool" ion="ca" initialConcentration="0 mM" initialExtConcentration="2E-6 mol_per_cm3"/>
                <resistivity value="0.1 kohm_cm"/>
            </intracellularProperties>
        </biophysicalProperties>
    </cell>
    <pulseGenerator id="offset_current" delay="0 ms" duration="2000 ms" amplitude="5.135697186048022 pA"/>
    <network id="c302_C1_Syns">
        <population id="AIZL" component="GenericNeuronCell" type="populationList">
            <instance id="0">
                <location x="5.6000004" y="-258.75" z="37.450000000000003"/>
            </instance>
        </population>
        <population id="ASHL" component="GenericNeuronCell" type="populationList">
            <instance id="0">
                <location x="5.55" y="-265.625" z="41."/>
            </instance>
        </population>
        <population id="SMDDR" component="GenericNeuronCell" type="populationList">
            <instance id="0">
                <location x="-7.4500003" y="-266.25" z="34.100000000000001"/>
            </instance>
        </population>
        <population id="URYDL" component="GenericNeuronCell" type="populationList">
            <instance id="0">
                <location x="4.125" y="-281.425000000000011" z="51.899997999999997"/>
            </instance>
        </population>
        <population id="VB11" component="GenericNeuronCell" type="populationList">
            <instance id="0">
                <location x="-1.8249999" y="262.324999999999989" z="-21.949999999999999"/>
            </instance>
        </population>
        <population id="VD12" component="GenericNeuronCell" type="populationList">
            <instance id="0">
                <location x="-0.75" y="345.5" z="-23.149999999999999"/>
            </instance>
        </population>
        <electricalProjection id="NC_AIZL_ASHL_Generic_GJ" presynapticPopulation="AIZL" postsynapticPopulation="ASHL">
            <electricalConnectionInstance id="0" preCell="../AIZL/0/GenericNeuronCell" preSegment="0" preFractionAlong="0.5" postCell="../ASHL/0/GenericNeuronCell" postSegment="0" postFractionAlong="0.5" synapse="elec_syn_1conns"/>
        </electricalProjection>
        <electricalProjection id="NC_ASHL_AIZL_Generic_GJ" presynapticPopulation="ASHL" postsynapticPopulation="AIZL">
            <electricalConnectionInstance id="0" preCell="../ASHL/0/GenericNeuronCell" preSegment="0" preFractionAlong="0.5" postCell="../AIZL/0/GenericNeuronCell" postSegment="0" postFractionAlong="0.5" synapse="elec_syn_1conns"/>
        </electricalProjection>
        <continuousProjection id="NC_VD12_VB11_GABA" presynapticPopulation="VD12" postsynapticPopulation="VB11">
            <continuousConnectionInstance id="0" preCell="../VD12/0/GenericNeuronCell" preSegment="0" preFractionAlong="0.5" postCell="../VB11/0/GenericNeuronCell" postSegment="0" postFractionAlong="0.5" preComponent="silent" postComponent="inh_syn_1conns"/>
        </continuousProjection>
        <continuousProjection id="NC_URYDL_SMDDR_Glutamate" presynapticPopulation="URYDL" postsynapticPopulation="SMDDR">
            <continuousConnectionInstance id="0" preCell="../URYDL/0/GenericNeuronCell" preSegment="0" preFractionAlong="0.5" postCell="../SMDDR/0/GenericNeuronCell" postSegment="0" postFractionAlong="0.5" preComponent="silent" postComponent="exc_syn_1conns"/>
        </continuousProjection>
        <inputList id="Input_AIZL_offset_current" population="AIZL" component="offset_current">
            <input id="0" target="../AIZL/0/GenericNeuronCell" destination="synapses"/>
        </inputList>
        <inputList id="Input_URYDL_offset_current" population="URYDL" component="offset_current">
            <input id="0" target="../URYDL/0/GenericNeuronCell" destination="synapses"/>
        </inputList>
        <inputList id="Input_VD12_offset_current" population="VD12" component="offset_current">
            <input id="0" target="../VD12/0/GenericNeuronCell" destination="synapses"/>
        </inputList>
    </network>
</neuroml>
